###%********************************************************************%
###%    Copyright The Production of y.yang.1983.comput.cmp@gmail.com    %
###%********************************************************************%

units		lj
atom_style	atomic

boundary p p p
read_data   Fstep3.50.data          #data.dump # [InputCW.lmp] is a input trajectory file of step1 (wall included)

mass * 1.0


# ---------------------------- Define variables --------------------------------

variable lam   file rev_lambda_wells.dat
variable  cnt   equal  1
variable rhoc equal 0.945
variable fact equal 1.2
variable  dw    equal 6.0 # pe per atom in liquid
variable  expp  equal 3.0
variable  eqnts equal  10000
variable  nts   equal  45000
variable  ts   equal  0.005
variable  siglj equal  1.0
variable  epslj   equal  1.0
variable  cut1  equal  2.3
variable  cut2  equal  2.5
variable Tsyst equal 0.1
variable Tdump equal 0.0748
variable Nevery equal 100
variable Nrepeat equal 5
variable Nfreq equal 500
variable thermoSteps equal 1000

# ----- Derivate variables ------

variable  cutoff1 equal  ${siglj}*${cut1}
variable  cutoff2 equal  ${siglj}*${cut2}
variable lambda equal ${lam}
variable a0 equal exp(1/3*ln(4/${rhoc}))
variable  rrw    equal  sqrt(2)*${a0}/4.0      # nearest neighbour fcc 111
variable  rw    equal ${rrw}*${fact}
variable  cntt  equal  ${cnt}


# ----------------------------- Interactions -----------------------------------


#### normal interactions
pair_style lj/BG ${cutoff1} ${cutoff2}
pair_coeff   * *  ${epslj} ${siglj}


neighbor     0.3 bin
neigh_modify every 1 delay 0 check yes
atom_modify  sort 0 0.0

# ------------------------- Define compute style -------------------------------

fix f4 all nvt temp ${Tsyst} ${Tsyst} ${Tdump}

# ------------- Output thermo information and averaged variables ---------------

thermo    ${thermoSteps}
timestep  ${ts}

# --------------- Dumping trajectories and store restart file ------------------

#dump        Dp1 all xyz 10000 dump/dump.*.xyz
#restart   30000 X.restart/X.restart

# -------------------------- Zero linear momentum ------------------------------

fix f5  all  momentum 1000 linear 1 1 1


# ----------------------- decreasing interactions wells ------------------------

label here
include    in.loop/loop
write_data data/Fstep4.${cnt}.data nocoeff
variable    cntt equal ${cnt}+1
variable    cnt  equal ${cntt}
next lam
jump SELF here
